// COMSOL Multiphysics 4.4.0.150 model "template_GaAs_basic_comsol44.mph"
// Outline of the model tree

Parameters
  t_2DEG = -100  // zPosition of the 2DEG
  chargeDensity = 0  // Surface charge density of 2DEG
  epsilon_hetero = 13  // Dielectric constant of lower domain
  epsilon_vac = 1  // Dielectric constant of upper domain
  l_domain = 3000  // Length of domain
  origin_x = 30000  // Origin of domain corner
  origin_y = 23400  // Origin of domain corner
  t_hetero = 500  // Height of lower domain
  t_vac = 500  // Height of upper domain
  w_domain = 1200  // Width of domain
  infinit_thickness = 100  // Thickness of the infinite element layers

Selections
  box1: Box "2DEG" | entitydim = 2; zmin = t_2DEG; zmax = t_2DEG; condition = inside
  box2: Box "Vacuum" | zmin = 0; condition = inside
  box3: Box "Hetero" | zmax = 0; condition = inside

Geometry
  geom1 "Geometry 1" (3D, length unit nm)
    blk1: Block "Vacuum" | pos = {origin_x, origin_y, 0}; size = {l_domain, w_domain, t_vac}
    blk2: Block "Hetero"
      pos = {origin_x, origin_y, -t_hetero}
      size = {l_domain, w_domain, t_hetero}
      layer = t_hetero+t_2DEG
    fin: Finalize "Form Union"

Materials
  mat1 "Heterostruct" on selection box3
    def "Basic"
      relpermittivity = epsilon_hetero
  mat2 "Vacuum" on selection box2
    def "Basic"
      relpermittivity = epsilon_vac

Physics
  es: Electrostatics on all domains
    dependent variable V
    ccn1: ChargeConservation (default)
    zc1: ZeroCharge (default)
    init1: init "Initial Values 1" (default)
    sfcd1: SurfaceChargeDensity on selection box1 | rhoqs = chargeDensity

Mesh
  mesh1 "Mesh 1"
    size: MeshSizeDefault | hauto = 3
    ftet: FreeTet "Free Tetrahedral" on remaining entities

Studies
  std "Study"
    stat: Stationary